// COMSOL Multiphysics 5.6.0.341 model "cubicModel-linSourceV-p-0-L-20000-pbc.mph"
// Outline of the model tree
// Unit system: none

Parameters
  L = 20000
  Dm = 1
  Dc = 10
  n0 = 0
  p = 0
  epsilon = 10^-6

Functions
  rn1: Random | funcname = rand; seed = 20220304

Variables
  var1 "Variables 1"
    f = eta-rho^3+rho
    source = p-rho

Geometry
  geom1 "Geometry 1" (1D, length unit m)
    i1: Interval | coord = {0, L}
    fin: Finalize "Form Union"

Physics
  g: GeneralFormPDE on all domains
    dependent variable u = {rho, eta}
    gfeq1: GeneralFormPDE (default)
      f = {epsilon*source, -f+epsilon*source}
      Ga = {-Dc*etax, -Dc*(1+Dm/Dc)*etax+Dm*rhox}
      da = {1, 0, 0, 1}
    zflx1: ZeroFluxBoundary "Zero Flux 1" (default)
    init1: init "Initial Values 1" (default) | rho = 0.01 * rand(x); m = n0*(1 + 0.01 * rand(x))
    pc1: PeriodicCondition on boundaries 1, 2 | destinationDomains: boundaries 2

Mesh
  mesh1 "Mesh 1"
    size: MeshSizeDefault | hmax = 0.5; custom = on
    edg1: Edge on remaining entities

Studies
  std1 "Study 1"
    time: Transient "Time Dependent" | tlist = 10^range(0,0.1,10); usertol = on; rtol = 1e-4; initstudy = zero

Solver configurations
  sol1 "Solution 1" (study std1)
    v1: Variables "Dependent Variables 1"
    t1: Time "Time-Dependent Solver 1" | tlist = 10^range(0,0.1,10); atolglobalvaluemethod = manual; atolglobal = 1e-5
      dDef: Direct | linsolver = pardiso
      fc1: FullyCoupled | linsolver = dDef

Datasets
  dset1: Solution | solution = sol1

Plots
  pg1: PlotGroup1D "1D Plot Group 1" | data = dset1
    lngr1: LineGraph on all domains | expr = eta
    lngr2: LineGraph on all domains | expr = rho

Exports
  data1: Data | data = dset1; expr = {rho, }; location = regulargrid; regulargridx1 = 40000